*HEADING
homogeneous uniaxial
*NODE, NSET=NALL
1, 0, 0, 0
2, 1, 0, 0
3, 0, 1, 0
4, 1, 1, 0
5, 0, 0, 1
6, 1, 0, 1
7, 0, 1, 1
8, 1, 1, 1
*ELEMENT, TYPE=C3D8, ELSET=EALL
1, 1, 2, 4, 3, 5, 6, 8, 7
*NSET, NSET=X0
1, 3, 5, 7
*NSET, NSET=X1
2, 4, 6, 8
*NSET, NSET=Y0
1, 2, 5, 6
*NSET, NSET=Z0
1, 2, 3, 4
*NSET, NSET=Z1
5, 6, 7, 8
*MATERIAL, NAME=AL
*ELASTIC
70000, 0.33
*PLASTIC
100, 0
102.005739, 0.001
103.986239, 0.002
105.94186, 0.003
107.872956, 0.004
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936.696389, 3

*SOLID SECTION, ELSET=EALL, MATERIAL=AL
*STEP, NLGEOM, INC=10000
*STATIC
0.0025, 1.0, 1e-6, 0.0025
*BOUNDARY
X0, 1, 1, 0.0
Y0, 2, 2, 0.0
Z0, 3, 3, 0.0
X1, 1, 1, 0.002002001334
*EL PRINT, ELSET=EALL
S, PEEQ
*NODE PRINT, NSET=X1, TOTALS=ONLY
RF
*END STEP
*STEP, NLGEOM, INC=10000
*STATIC
0.0025, 1.0, 1e-6, 0.0025
*BOUNDARY
X0, 1, 1, 0.0
Y0, 2, 2, 0.0
Z0, 3, 3, 0.0
X1, 1, 1, 0.0100501670842
*EL PRINT, ELSET=EALL
S, PEEQ
*NODE PRINT, NSET=X1, TOTALS=ONLY
RF
*END STEP
*STEP, NLGEOM, INC=10000
*STATIC
0.0025, 1.0, 1e-6, 0.0025
*BOUNDARY
X0, 1, 1, 0.0
Y0, 2, 2, 0.0
Z0, 3, 3, 0.0
X1, 1, 1, 0.051271096376
*EL PRINT, ELSET=EALL
S, PEEQ
*NODE PRINT, NSET=X1, TOTALS=ONLY
RF
*END STEP
*STEP, NLGEOM, INC=10000
*STATIC
0.0025, 1.0, 1e-6, 0.0025
*BOUNDARY
X0, 1, 1, 0.0
Y0, 2, 2, 0.0
Z0, 3, 3, 0.0
X1, 1, 1, 0.105170918076
*EL PRINT, ELSET=EALL
S, PEEQ
*NODE PRINT, NSET=X1, TOTALS=ONLY
RF
*END STEP
*STEP, NLGEOM, INC=10000
*STATIC
0.0025, 1.0, 1e-6, 0.0025
*BOUNDARY
X0, 1, 1, 0.0
Y0, 2, 2, 0.0
Z0, 3, 3, 0.0
X1, 1, 1, 0.22140275816
*EL PRINT, ELSET=EALL
S, PEEQ
*NODE PRINT, NSET=X1, TOTALS=ONLY
RF
*END STEP
*STEP, NLGEOM, INC=10000
*STATIC
0.0025, 1.0, 1e-6, 0.0025
*BOUNDARY
X0, 1, 1, 0.0
Y0, 2, 2, 0.0
Z0, 3, 3, 0.0
X1, 1, 1, 0.349858807576
*EL PRINT, ELSET=EALL
S, PEEQ
*NODE PRINT, NSET=X1, TOTALS=ONLY
RF
*END STEP
*STEP, NLGEOM, INC=10000
*STATIC
0.0025, 1.0, 1e-6, 0.0025
*BOUNDARY
X0, 1, 1, 0.0
Y0, 2, 2, 0.0
Z0, 3, 3, 0.0
X1, 1, 1, 0.491824697641
*EL PRINT, ELSET=EALL
S, PEEQ
*NODE PRINT, NSET=X1, TOTALS=ONLY
RF
*END STEP
*STEP, NLGEOM, INC=10000
*STATIC
0.0025, 1.0, 1e-6, 0.0025
*BOUNDARY
X0, 1, 1, 0.0
Y0, 2, 2, 0.0
Z0, 3, 3, 0.0
X1, 1, 1, 0.6487212707
*EL PRINT, ELSET=EALL
S, PEEQ
*NODE PRINT, NSET=X1, TOTALS=ONLY
RF
*END STEP
*STEP, NLGEOM, INC=10000
*STATIC
0.0025, 1.0, 1e-6, 0.0025
*BOUNDARY
X0, 1, 1, 0.0
Y0, 2, 2, 0.0
Z0, 3, 3, 0.0
X1, 1, 1, 0.491824697641
*EL PRINT, ELSET=EALL
S, PEEQ
*NODE PRINT, NSET=X1, TOTALS=ONLY
RF
*END STEP
*STEP, NLGEOM, INC=10000
*STATIC
0.0025, 1.0, 1e-6, 0.0025
*BOUNDARY
X0, 1, 1, 0.0
Y0, 2, 2, 0.0
Z0, 3, 3, 0.0
X1, 1, 1, 0.349858807576
*EL PRINT, ELSET=EALL
S, PEEQ
*NODE PRINT, NSET=X1, TOTALS=ONLY
RF
*END STEP
*STEP, NLGEOM, INC=10000
*STATIC
0.0025, 1.0, 1e-6, 0.0025
*BOUNDARY
X0, 1, 1, 0.0
Y0, 2, 2, 0.0
Z0, 3, 3, 0.0
X1, 1, 1, 0.22140275816
*EL PRINT, ELSET=EALL
S, PEEQ
*NODE PRINT, NSET=X1, TOTALS=ONLY
RF
*END STEP
*STEP, NLGEOM, INC=10000
*STATIC
0.0025, 1.0, 1e-6, 0.0025
*BOUNDARY
X0, 1, 1, 0.0
Y0, 2, 2, 0.0
Z0, 3, 3, 0.0
X1, 1, 1, 0.105170918076
*EL PRINT, ELSET=EALL
S, PEEQ
*NODE PRINT, NSET=X1, TOTALS=ONLY
RF
*END STEP
*STEP, NLGEOM, INC=10000
*STATIC
0.0025, 1.0, 1e-6, 0.0025
*BOUNDARY
X0, 1, 1, 0.0
Y0, 2, 2, 0.0
Z0, 3, 3, 0.0
X1, 1, 1, 0
*EL PRINT, ELSET=EALL
S, PEEQ
*NODE PRINT, NSET=X1, TOTALS=ONLY
RF
*END STEP
