*HEADING
punch cross-check
*NODE, NSET=NSHEET
1, -20, -20, -1
2, -18, -20, -1
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*NODE, NSET=PUNCH
1324, -2.30940107676, -2.30940107676, 1.69059892324
1325, -2.02072594216, -2.02072594216, 1.97927405784
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*ELEMENT, TYPE=C3D8I, ELSET=SHEET
1, 1, 2, 23, 22, 442, 443, 464, 463
2, 2, 3, 24, 23, 443, 444, 465, 464
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*ELEMENT, TYPE=C3D8, ELSET=TOOL
801, 1324, 1326, 1392, 1390, 1325, 1327, 1393, 1391
802, 1326, 1328, 1394, 1392, 1327, 1329, 1395, 1393
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*NSET, NSET=CLAMP
1, 2, 3, 4, 5, 6
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*NSET, NSET=SUPA
905
*NSET, NSET=SUPB
923
*NSET, NSET=SUPC
1283
*NSET, NSET=NTOP
883, 884, 885, 886, 887, 888
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*ELSET, ELSET=ETOPL
401, 402, 403, 404, 405, 406
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*SURFACE, NAME=SSLAVE, TYPE=ELEMENT
ETOPL, S2
*SURFACE, NAME=SMASTER, TYPE=ELEMENT
801, S1
802, S1
803, S1
804, S1
805, S1
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3872, S1
*MATERIAL, NAME=AL
*ELASTIC
70000, 0.33
*PLASTIC
100, 0
102.005739, 0.001
103.986239, 0.002
105.94186, 0.003
107.872956, 0.004
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936.696389, 3

*MATERIAL, NAME=STEEL
*ELASTIC
210000., 0.3
*SOLID SECTION, ELSET=SHEET, MATERIAL=AL
*SOLID SECTION, ELSET=TOOL, MATERIAL=STEEL
*SURFACE INTERACTION, NAME=SI
*SURFACE BEHAVIOR, PRESSURE-OVERCLOSURE=LINEAR
350000, 0.01
*FRICTION
0.1, 350000
*CONTACT PAIR, INTERACTION=SI, TYPE=NODE TO SURFACE
SSLAVE, SMASTER
*STEP, NLGEOM, INC=100000
*STATIC
0.0333333, 1.0, 3.33333e-06, 0.0333333
*BOUNDARY
*BOUNDARY
CLAMP, 1, 1, 0.0
CLAMP, 3, 3, 0.0
CLAMP, 2, 2, 0.0
*BOUNDARY
PUNCH, 1, 1, 0
PUNCH, 2, 2, 0
PUNCH, 3, 3, -3
*NODE PRINT, NSET=PUNCH, TOTALS=ONLY
RF
*NODE PRINT, NSET=NTOP
U
*EL PRINT, ELSET=SHEET
PEEQ
*END STEP
*STEP, NLGEOM, INC=100000
*STATIC
0.0333333, 1.0, 3.33333e-06, 0.0333333
*BOUNDARY
*BOUNDARY
CLAMP, 1, 1, 0.0
CLAMP, 3, 3, 0.0
CLAMP, 2, 2, 0.0
*BOUNDARY
PUNCH, 1, 1, 3
PUNCH, 2, 2, 0
PUNCH, 3, 3, -3
*NODE PRINT, NSET=PUNCH, TOTALS=ONLY
RF
*NODE PRINT, NSET=NTOP
U
*EL PRINT, ELSET=SHEET
PEEQ
*END STEP
*STEP, NLGEOM, INC=100000
*STATIC
0.05, 1.0, 1e-7, 0.05
*MODEL CHANGE, TYPE=CONTACT PAIR, REMOVE
SSLAVE, SMASTER
*BOUNDARY
*BOUNDARY
CLAMP, 1, 1, 0.0
CLAMP, 3, 3, 0.0
CLAMP, 2, 2, 0.0
*BOUNDARY
PUNCH, 1, 1, 3
PUNCH, 2, 2, 0
PUNCH, 3, 3, -3
*NODE PRINT, NSET=PUNCH, TOTALS=ONLY
RF
*NODE PRINT, NSET=NTOP
U
*EL PRINT, ELSET=SHEET
PEEQ
*END STEP
*STEP, NLGEOM, INC=100000
*STATIC
0.05, 1.0, 1e-6, 0.05
*BOUNDARY, OP=NEW
PUNCH, 1, 1, 3
PUNCH, 2, 2, 0
PUNCH, 3, 3, -3
SUPA, 1, 3, 0.0
SUPB, 2, 3, 0.0
SUPC, 3, 3, 0.0
*NODE PRINT, NSET=PUNCH, TOTALS=ONLY
RF
*NODE PRINT, NSET=NTOP
U
*EL PRINT, ELSET=SHEET
PEEQ
*END STEP
