*NODE, NSET=NALL
1, -0.015, -0.015, 0
2, -0.01425, -0.015, 0
3, -0.0135, -0.015, 0
4, -0.01275, -0.015, 0
5, -0.012, -0.015, 0
6, -0.01125, -0.015, 0
7, -0.0105, -0.015, 0
8, -0.00975, -0.015, 0
9, -0.009, -0.015, 0
10, -0.00825, -0.015, 0
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*ELEMENT, TYPE=S4, ELSET=EALL
1, 1, 2, 43, 42
2, 2, 3, 44, 43
3, 3, 4, 45, 44
4, 4, 5, 46, 45
5, 5, 6, 47, 46
6, 6, 7, 48, 47
7, 7, 8, 49, 48
8, 8, 9, 50, 49
9, 9, 10, 51, 50
10, 10, 11, 52, 51
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*MATERIAL, NAME=AL
*ELASTIC
70000000000.0, 0.33
*DENSITY
2670.0
*SHELL SECTION, ELSET=EALL, MATERIAL=AL
0.001
*BOUNDARY
1, 1, 6
2, 1, 6
3, 1, 6
4, 1, 6
5, 1, 6
6, 1, 6
7, 1, 6
8, 1, 6
9, 1, 6
10, 1, 6
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*STEP
*STATIC
*DLOAD
EALL, GRAV, 9.81, 0., 0., -1.
*NODE FILE
U
*NODE PRINT, NSET=NALL
U
*END STEP
